L := 20
C := 100*10^-6
X := 15
ORIGIN := 1
j := sqrt(-1) = 1i
R := 20 + 5*X = 95
E := 20*X = 300
R1 := R
R3 := R
R4 := R
R5 := R
R7 := R
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IL0 == ILpr + ILcv
UС0 == Ulpr + ULcv
n := 2
Given
0 == R1 + R3*p*L/(R3 + p*L) + R4*(R7 + R5*1/(p*C)/(R5 + 1/(p*C)))/(R4 + (R7 + R5*1/(p*C)/(R5 + 1/(p*C))))
p := Find(p) → [11*sqrt(32619809)/760 - 65083/760, -11*sqrt(32619809)/760 - 65083/760] = [-2.97088, -168.3]
p = [-2.97088, -168.3]
p1 := -2.971
p2 := -168.3
IL == A1*e^(p1*t) + A2*e^(p2*t)
UC == B1*e^(p1*t) + B2*e^(p2*t)
I := E/(R1 + R3 + R4*(R7 + R5)/(R4 + R5 + R7)) = 1.18421
UC0 := I*R4/(R7 + R5)*R5 = 56.25
IL0 := 0
I := E/(R1 + R4*(R7 + R5)/(R4 + R5 + R7)) = 1.89474
ILp := I
UCp := R5*I*R4/(R7 + R5) = 90
Given
IL0 == ILp + A1 + A2
IL0/L == p1*A2 + p2*A2
UC0 == UCp + B1 + B2
UC0/C == p1*B1 + p2*B2
A := Find(A1, A2, B1, B2) → [-1.89473684211; 0; 3367.95042007; -3401.70042007]
IL(t) := ILp + A[1]*e^(p1*t) + A[2]*e^(p2*t)
UC(t) := UCp + A[3]*e^(p1*t) + A[4]*e^(p2*t)
t := 0.01, 0.02 .. 4
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