L := 20*10^-3
C := 100*10^-6
X := 15
ORIGIN := 1
j := sqrt(-1) = 1i
R := 20 + 5*X = 95
E := 20*X = 300
R1 := R
R2 := R
R3 := R
R4 := R
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# 1. Расчет НУ до момента коммутации | 2. Расчет принужденной составляющей
I_0 := E/(R1 + R2 + R3*R4/(R3 + R4)) = 1.26316
I_pr := E/(R1 + R3*R4/(R3 + R4)) = 2.10526
IL_0 := I_0/2 = 0.631579
IL_pr := I_pr/2 = 1.05263
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# 3. Составим характеристическое уравнение (после коммутации)
Zэкв == R1 + (R4 + j*w*L)*R3/(R3 + R4 + j*w*L)
# Заменим jw на p и решим
Given
0 == R1 + (R4 + p*L)*R3/(R3 + R4 + p*L)
p := Find(p) → -7125
# 4. Расчёт свободной составляющей (в момент времени t = 0)
IL_0 == IL_pr + A*e^(p*t)
A := IL_0 - IL_pr = -0.421053
# 5. Составим уравнения зависимости для катушки
IL(t) := IL_pr + A*e^(p*t)
UL(t) := L*(d/dt(IL(t))) → 60*e^(-7125*t)
t := 0, 0.00001 .. 0.001
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# №2. Операторный метод
R5 := R
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I_0 := E/(R1 + R4*R3/(R3 + R4)) = 2.10526
IL_0 := I_0/2 = 1.05263
EL := IL_0*L = 0.0210526
# 1.1 Схема замещения
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p := p
Given
I1 - I2 + I3 == 0
E/p + EL == I1*R1 + L*p*I2 + R4*I2
EL == R4*I2 - R2*I3 - R3*I3 + L*p*I2
F(p) := Find(I1, I2, I3) → [
    -1.0*(2.5e16*p - 3.5625e20)/(2.375e16*p^2 + 3.384375e20*p);
    (2.63157894737e15*p + 7.5e19)/(2.5e15*p^2 + 3.5625e19*p);
    (1e17*p + 7.125e20)/(4.75e16*p^2 + 6.76875e20*p)
]
IL(p) := F(p)[2] → (2.63157894737e15*p + 7.5e19)/(3.5625e19*p + 2.5e15*p^2)
Given
3.5625e19*p + 2.5e15*p^2 == 0
pL := transpose(Find(p)) → [0; -14250.0]
p1 := pL[1]
p2 := pL[2]
proizv(p) := d/dp(3.5625e19*p + 2.5e15*p^2) → 5e15*p + 3.5625e19
znam(p) := 2.63157894737e15*p + 7.5e19
iL(t) := znam(p1)/proizv(p1)*e^(p1*t) + znam(p2)/proizv(p2)*e^(p2*t) → -1.05263157895*e^(-14250.0*t) + 2.10526315789
UL(t) := L*(d/dt(iL(t))) → 300*e^(-14250.0*t)
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