L := 0.5
C := 100*10^-6
X := 15
R := 20*X = 300
R1 := R
R2 := R
R3 := R
R4 := R
E1 := 20*X = 300
R5 := R
E2 := 20*X = 300
j := sqrt(-1) = 1i
J := 0.1*(X + 2) = 1.7
# 1. Расчет до коммутации
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# 1. Расчет принужденной состовляющей
Given
I1 - I2 - I3 == 0
E1 == I1*(R1 + R3) + I2*R4
E2 - E1 == -I2*R4 + R5*I3
I := Find(I1, I2, I3) → [2/5; 1/5; 1/5]
ILpr := I[0] = 0.4
Ucpr := ILpr*R1 = 120
# 2. Характеристическое уравнение
Given
R + 1/(1/(2*R) + 1/(R + 1/(p*C)) + 1/(R + p*L)) == 0
p := Find(p) → [-836.078810085, -23.9211899151] = [-836.079, -23.9212]
p1 := -836.079
p2 := -23.921
# 3. Независимые
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I_0 := E1/(R1 + R3 + R4) = 0.333333
IL_0 := I_0 = 0.333333
UC_0 := I_0*R1 = 100
# 4 Зависимые НУ
Given
IL_0 + I2 - I3 == 0
-IL_0 - I2 + I4 + I5 == 0
UC_0 - UL_0 == IL_0*R1 - R2*I2
-E1 + UC_0 == -I2*R2 - I3*R3 - R4*I4
E2 - E1 == -I4*R4 + I5*R5
I := Find(I2, I3, I4, I5, UL_0) → [0.0666666666667; 0.4; 0.2; 0.2; 20]
UL_0 := I[4] = 20
IC_0 := I[0] = 0.0666667
Given
IL_0 == ILpr + A1 + A2
UL_0/L == p1*A1 + p2*A2
UC_0 == Ucpr + B1 + B2
IC_0/C == p1*B1 + p2*B2
AB := Find(A1, A2, B1, B2) → [-0.0472879250918; -0.0193787415749; -0.231785769107; -19.7682142309]
AB[3] = -19.7682
IL(t) := ILpr + AB[0]*e^(p1*t) + AB[1]*e^(p2*t) → -0.0193787415749*e^(-23.921*t) + (-0.0472879250918*e^(-836.079*t)) + 0.4
UL(t) := L*(d/dt(IL(t))) → 0.231779438607*e^(-23.921*t) + 19.7682205614*e^(-836.079*t)
t := 0, 0.0001 .. 0.01
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UC(t) := Ucpr + AB[2]*e^(p1*t) + AB[3]*e^(p2*t) → -19.7682142309*e^(-23.921*t) + (-0.231785769107*e^(-836.079*t)) + 120
IC(t) := C*(d/dt(UC(t))) → 0.0193791214049*e^(-836.079*t) + 0.0472875452617*e^(-23.921*t)
t := 0, 0.001 .. 0.5
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