L := 0.5
C := 100*10^-6
X := 15
R := 20*X = 300
R1 := R
R2 := R
R3 := R
R4 := R
E1 := 20*X = 300
R5 := R
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E2 := 20*X = 300
j := sqrt(-1) = 1i
J := 0.1*(X + 2) = 1.7
# 1. Расчет до коммутации
iL_0 := E2/(3*R) = 0.333333
EL := L*iL_0 = 0.166667
Ec := 100
Given
I1 + I2 - I3 == 0
-I1 - I2 + I4 + I5 == 0
E2/p - E1/p == -I4*R + I5*R
Ec/p - E1/p == -I4*R4 - I3*R3 - I2*R2 - I2*1/(p*C)
Ec/p + EL == I1*R1 + I1*p*L - I2*R2 - I2*1/(p*C)
Find(I1, I2, I3, I4, I5) → [
    (2.5e16*p^2 + 2.73333333333e19*p + 6e20)/(7.5e16*p^3 + 7.3e19*p^2 + 1.5e21*p);
    (2.5e16*p + 1.5e19)/(3.75e17*p^2 + 3.65e20*p + 7.5e21);
    (7.5e16*p^2 + 7.58333333333e19*p + 1.5e21)/(1.875e17*p^3 + 1.825e20*p^2 + 3.75e21*p);
    (7.5e16*p^2 + 7.58333333333e19*p + 1.5e21)/(3.75e17*p^3 + 3.65e20*p^2 + 7.5e21*p);
    (7.5e16*p^2 + 7.58333333333e19*p + 1.5e21)/(3.75e17*p^3 + 3.65e20*p^2 + 7.5e21*p)
]
N1(p) := 7.5e16*p^3 + 7.3e19*p^2 + 1.5e21*p
N1(p) solve, p → [0; -952.332259603; -21.0010737307]
p1 := 0
p2 := -952.332259603
p3 := -21.0010737307
N2(p) := d/dp(N1(p)) → 1.46e20*p + 2.25e17*p^2 + 1.5e21
M1(p) := 2.5e16*p^2 + 2.73333333333e19*p + 6e20
iL(t) := M1(p1)/N2(p1)*e^(p1*t) + M1(p2)/N2(p2)*e^(p2*t) + M1(p3)/N2(p3)*e^(p3*t)
t := 0, 0.0001 .. 0.01
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