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# Самсонов Павел Вариант 15
E := 360
T := 1.8*10^-2
R1 := 10
R2 := 20
R3 := 12
L := 35*10^-3
C := 60*10^-6
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E0 := E/4 = 90
E1 := E/(π*0.843) = 135.933
E2 := E/(π*2) = 57.2958
E3 := E/(π*3) = 38.1972
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Ecp := sqrt(E0^2 + (E1^2 + E2^2 + E3^2)/2) = 140.392
w := 2*π/T = 349.066
t1 := 0, 0.4 .. 2*π
u(t1) := 90 + 135.933*sin(w*t1 + 32.05^deg) + 57.296*sin(2*w*t1) + 38.197*sin(3*w*t1)
u0(t1) := 90
u1(t1) := 135.933*sin(w*t1)
u2(t1) := 57.296*sin(2*w*t1)
u3(t1) := 38.197*sin(3*w*t1)
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I1 := E0/(R1 + R2) = 3
I2 := I1 = 3
I3 := 0
Pist0 := E0*I1 = 270
j := sqrt(-1)
Ppot0 := R1*I1^2 + R2*I2^2 = 270
e1(t) := 135.933*sin(w*t)
Em1 := 135.933*e^(j*π)
Z1 := R1 = 10
Z2 := R2 + j*w*L = 20 + 12.2173i
Z3 := -j*1/(w*C) = -47.7465i
Z23 := Z2*Z3/(Z2 + Z3) = 27.4282 + 0.978607i
Im1 := Em1/(Z1 + Z23) = -3.62935 + 0.0948939i
Um2 := Z23*Im1 = -99.6395 - 0.948939i
Im2 := Um2/Z2 = -3.64923 + 2.18174i
Im3 := Um2/Z3 = 0.0198745 - 2.08684i
phi1 := 57.3*(3.14 + atan(0.095/(-3.629))) = 178.422
r1 := sqrt((-3.629)^2 + 0.095^2) = 3.63024
r2 := sqrt((-3.649)^2 + 2.182^2) = 4.25163
phi2 := 57.3*(3.14 + atan(2.182/(-3.649))) = 149.041
r3 := sqrt(0.02^2 + (-2.087)^2) = 2.0871
phi3 := 57.3*atan(-2.087/0.02) = -89.4575
i11(t) := r1*sin(w*t - phi1) → 3.63024324254*sin(349.065850399*t - 178.422342503)
i12(t) := r2*sin(w*t - phi2) → 4.25162615948*sin(349.065850399*t - 149.041481509)
i13(t) := r3*sin(w*t - phi3) → 2.08709582914*sin(349.065850399*t + 89.4575327738)
Sist1 := Em1/sqrt(2)*Im1/sqrt(2) = 246.674 - 6.44961i
Ppot1 := R1*(|Im1|/sqrt(2))^2 + R2*(|Im2|/sqrt(2))^2 = 246.674
Qpot1 := -j*w*L*(|Im2|/sqrt(2))^2 + j*1/(w*C)*(|Im3|/sqrt(2))^2 = -6.44961i
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# Вторая гармоника
Em1 := 57.296*e^(j*π)
Z1 := R1 = 10
Z2 := R2 + j*w*L = 20 + 12.2173i
Z3 := -j*1/(w*C) = -47.7465i
Z23 := Z2*Z3/(Z2 + Z3) = 27.4282 + 0.978607i
Im1 := Em1/(Z1 + Z23) = -1.52978 + 0.039998i
Um2 := Z23*Im1 = -41.9982 - 0.39998i
Im2 := Um2/Z2 = -1.53816 + 0.919607i
Im3 := Um2/Z3 = 0.00837715 - 0.879609i
phi1 := 57.3*(3.14 + atan(0.04/(-1.53))) = 178.424
r1 := sqrt((-1.53)^2 + 0.04^2) = 1.53052
r2 := sqrt((-1.538)^2 + 0.92^2) = 1.79216
phi2 := 57.3*(3.14 + atan(0.92/(-1.538))) = 149.033
r3 := sqrt(8.377*10^-3 + (-0.88)^2) = 0.884747
phi3 := 57.3*atan(-0.88/(8.377*10^-3)) = -89.4612
i21(t) := r1*sin(w*2*t - phi1) → 1.5305227865*sin(698.131700798*t - 178.424301947)
i22(t) := r2*sin(w*2*t - phi2) → 1.79216182305*sin(698.131700798*t - 149.032728139)
i23(t) := r3*sin(w*2*t - phi3) → 0.884746856451*sin(698.131700798*t + 89.4611890686)
Sist2 := Em1/sqrt(2)*Im1/sqrt(2) = 43.8251 - 1.14586i
Ppot2 := R1*(|Im1|/sqrt(2))^2 + R2*(|Im2|/sqrt(2))^2 = 43.8251
Qpot2 := -j*w*L*(|Im2|/sqrt(2))^2 + j*1/(w*C)*(|Im3|/sqrt(2))^2 = -1.14586i
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# Третья гармоника
Em1 := 38.197*e^(j*π)
Z1 := R1 = 10
Z2 := R2 + j*w*L = 20 + 12.2173i
Z3 := -j*1/(w*C) = -47.7465i
Z23 := Z2*Z3/(Z2 + Z3) = 27.4282 + 0.978607i
Im1 := Em1/(Z1 + Z23) = -1.01984 + 0.0266651i
Um2 := Z23*Im1 = -27.9986 - 0.266651i
Im2 := Um2/Z2 = -1.02543 + 0.613066i
Im3 := Um2/Z3 = 0.00558472 - 0.586401i
phi1 := 57.3*(3.14 + atan(0.027/(-1.02))) = 178.406
r1 := sqrt((-1.02)^2 + 0.027^2) = 1.02036
r2 := sqrt((-1.025)^2 + 0.613^2) = 1.19432
phi2 := 57.3*(3.14 + atan(0.613/(-1.025))) = 149.038
r3 := sqrt(5.585*10^-3 + (-0.586)^2) = 0.590746
phi3 := 57.3*atan(-0.586/(5.585*10^-3)) = -89.4605
i31(t) := r1*sin(w*3*t - phi1) → 1.02035729036*sin(1047.1975512*t - 178.405589407)
i32(t) := r2*sin(w*3*t - phi2) → 1.19431737825*sin(1047.1975512*t - 149.038242877)
i33(t) := r3*sin(w*3*t - phi3) → 0.590746138371*sin(1047.1975512*t + 89.4605359914)
Sist3 := Em1/sqrt(2)*Im1/sqrt(2) = 19.4775 - 0.509263i
Ppot3 := R1*(|Im1|/sqrt(2))^2 + R2*(|Im2|/sqrt(2))^2 = 19.4775
Qpot3 := -j*w*L*(|Im2|/sqrt(2))^2 + j*1/(w*C)*(|Im3|/sqrt(2))^2 = -0.509263i
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i1(t) := (I1 + i11(t) + i12(t) + i13(t))
i1(t) simplify → 4.06803950536*cos(349.065850399*t) - 3.50967270192*sin(349.065850399*t) + 3.0
i2(t) := I2 + i21(t) + i22(t) + i23(t)
i2(t) simplify → 1.71926984743*cos(698.131700798*t) - 1.4996968153*sin(698.131700798*t) + 3.0
i3(t) := I3 + i31(t) + i32(t) + i33(t)
i3(t) simplify → 1.13272244763*cos(1047.1975512*t) - 0.981153612168*sin(1047.1975512*t)
I1 := sqrt(I1^2 + (3.63024324254^2 + 4.25162615948^2 + 2.08709582914^2)/2) = 5.1774
I2 := sqrt(I2^2 + (1.5305227865^2 + 1.79216182305^2 + 0.884746856451^2)/2) = 3.48835
I3 := sqrt(I3^2 + (1.02035729036^2 + 1.19431737825^2 + 0.590746138371^2)/2) = 1.1867
S := E*I1 = 1863.86
P := Ppot0 + Ppot1 + Ppot2 + Ppot3 = 579.977
Q := Qpot1 + Qpot2 + Qpot3 = -8.10473i
T := sqrt(S^2 - P^2 - Q^2) = 1771.35
λ := P/S = 0.311169
