E := 90
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R1 := 20
R2 := 25
R3 := 60
L := 25*10^-3
Given
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E == I2*R2
I1 - I2 - I3 == 0
0 == I2*R2 + I3*R3
IL0 := E/(R1 + R2) = 2
Find(I1, I2, I3) → [21/10; 18/5; -3/2]
I1 := 51/10
I2 := 18/5  # ПРИНУЖДЕННЫЕ ТОКИ
I3 := 3/2
Ul_pr := E = 90
Given
# Грищук Егор
# 521325
# Практическая работа 2
# 5 вариант
0 == p*L*R1/(p*L + R1) + R2*R3/(R2 + R3)
Find(p) → -375 = -375
p := -375
A := IL0 - I1 = -3.1
Il(t1) := I1 + A*e^(p*t1) → -3.1*e^(-375*t1) + 51/10
Ul(t1) := L*(d/dt1(Il(t1))) → 29.0625*e^(-375*t1)
t1 := 0, 10^-6 .. 0.05
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