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Ik := 0.2
E := 100
ORIGIN := 1
R1 := 200
R2 := 100
R3 := 100
R := 100
C := 0.1*10^-6
Icpr := 0
Given
Ik - I1 + I2 == 0
E == -Ik*R + U
E == I1*R2 + I1*R1 + I1*R3
E/(R1 + R2 + R3) = 0.25
I := Find(I1, I2, U) → [0.25; 0.05; 120.0]
Ik*R = 20
Ucpr := E/(R1 + R2 + R3)*R1 = 50
Given
0 == R + R2*R3/(R2 + R3) + R1*1/(p*C)/(R1 + 1/(p*C))
p := Find(p) → -116666.666667
p = -116667
Uc0 := Ik*(R + R1 + R2 + R3) = 100
t := 0, 0.0000001 .. 0.00007
U(t) := 50 - 50*e^(p*t)
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IC(t) := C*(d/dt(U(t)))
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