R1 := 32
R2 := R1 = 32
R3 := R1 = 32
C := 50*10^-6
L := 0.022
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j := sqrt(-1) = 1i
f := 50
w := 2*π*f = 314.159
E1 := 85*e^(-60*j*deg) = 42.5 - 73.6122i
E0 := 50
Xc := 6
Xl := 4
# Нулевая гармоника
I10 := E0/R1 = 1.5625
I30 := I10
I20 := 0
Z3 := j*Xl
Z1 := R1
Z2 := R2 + j*Xc
Ze := Z1 + Z2*Z3/(Z2 + Z3) = 32.4555 + 3.85765i
I11 := E1/Ze = 1.02541 - 2.38997i
I21 := I11*Z3/(Z2 + Z3) = 0.308659 + 0.0317206i
I31 := I11*Z2/(Z2 + Z3) = 0.716754 - 2.42169i
Z13 := R1
Z23 := R2 + j*Xc/3
Z33 := j*Xl*3 = 12i
Ze := Z13 + Z23*Z33/(Z23 + Z33) = 35.777 + 10.3475i
E3 := 25*e^(j*15*deg)
I13 := E3/Ze = 0.67113 - 0.0132505i
I23 := I11*Z3/(Z2 + Z3) = 0.308659 + 0.0317206i
I33 := I11*Z2/(Z2 + Z3) = 0.716754 - 2.42169i
r1 := sqrt(1.025^2 + (-2.39)^2) = 2.60052
phi1 := 57.3*atan(-2.39/1.025) = -66.7919
r2 := sqrt(0.671^2 + (-0.013)^2) = 0.671126
phi2 := 57.3*atan(0.013/0.671) = 1.11
Мгновенные
i1(t) := I10 + r1*sin(t - phi1) + r2*sin(3*t - phi2) → 0.671125919631*sin(3*t - 1.10999526148) + 2.60052398566*sin(t + 66.7918641276) + 1.5625
r1 := sqrt(0.309^2 + 0.032^2) = 0.310653
phi1 := 57.3*atan(0.032/0.309) = 5.9129
r2 := sqrt(0.309^2 + 0.032^2) = 0.310653
phi2 := 57.3*atan(0.032/0.309) = 5.9129
i2(t) := I20 + r1*sin(t - phi1) + r2*sin(3*t - phi2) → 0.310652539021*sin(t - 5.91290276654) + 0.310652539021*sin(3*t - 5.91290276654)
r1 := sqrt(0.717^2 + (-2.422)^2) = 2.5259
phi1 := 57.3*atan(-2.422/0.717) = -73.5147
r2 := sqrt(0.717^2 + (-2.422)^2) = 2.5259
phi2 := 57.3*atan(-2.422/0.717) = -73.5147
i3(t) := I30 + r1*sin(t - phi1) + r2*sin(3*t - phi2) → 2.52590043351*sin(3*t + 73.5147470527) + 2.52590043351*sin(t + 73.5147470527) + 1.5625
# Действующие | '
I1 := sqrt(I10^2 + Re(I11)^2 + Re(I13)^2) = 1.98577
I2 := sqrt(I20^2 + Re(I21)^2 + Re(I23)^2) = 0.43651
I3 := sqrt(I30^2 + Re(I31)^2 + Re(I33)^2) = 1.86249
Pist := E0*I10 + Re(E1*conj(I11)) + Re(E3*conj(I13)) = 313.757
Ppot := I1^2*R1 + I2^2*R2 + I3^2*R3 = 243.287
delP := (Pist - Ppot)/Pist*100 = 22.4601
Qist := Im(E1*conj(I11)) + Im(E3*conj(I13)) = 30.7535
Qpot := Re(I21^2)*Xl + Re(I23^2)*Xl*3 - Re(I31^2)*Xc - Re(I33^2)*Xc/3 = 44.3152
delQ := |Qist - Qpot|/Qist*100 = 44.0979
